# CNT with REBO and tip4p-ice
# Test 1
#######################################################################MINIMIZATION###############################################################

#---------------------------------------------------------------------INITIALIZATION-------------------------------------------------------------#
variable T equal 363

package omp 1

units 	metal
dimension	3
boundary	p p p
atom_style	full
#atom_modify	id yes

#--------------------------------------------------------------------ATOM-DEFINITION------------------------------------------------------------#
read_data data-file-cnt1.06-water-0.60.data
# 1 C, 2 H, 3 O.

#-----------------------------------------------------------------------SETTINGS----------------------------------------------------------------#
#THE UNITS OF SIC TERSOFF WERE CHANGED FROM METAL TO REAL
#Interactions H - O tip4p/ice
# using Lorentz-Berthelot mixing rules

#Non-bonded interactions:
pair_style hybrid  rebo/omp   lj/cut/tip4p/long/omp 3 2 1 1 0.1250 10 	lj/cut/coul/long/omp 10
pair_coeff * * rebo/omp CH.airebo C NULL NULL


#for lj/cut: epsilon sigma cutoff1 cutoff2
pair_coeff 1 2 lj/cut/coul/long/omp 0.0 0.0
pair_coeff 1 3 lj/cut/coul/long/omp  0.004766908  3.282175  #for C-O
pair_coeff 2 2 lj/cut/tip4p/long/omp 0.0 0.0
pair_coeff 2 3 lj/cut/tip4p/long/omp 0.0 0.0
pair_coeff 3 3 lj/cut/tip4p/long/omp  0.007058   3.16435#O-O

bond_style harmonic/omp
#K can be any value since it is fixed by fix shake
bond_coeff 1 5000 0.9572

angle_style harmonic/omp
angle_coeff 1 5000 104.52


#Box size has to be included in data file
#all the anchors are here:
group	2MiddleAnchor	id	738 752 773 802 842 843 892 946 947 1002 1003 1058 1114 1171 1226 1227 1278 1279 1510 1540 1580 1581 1630 1684 1741 1796 1852 1853 1908 1909 1964 2017 2061 2095 2096 2124 2318 2319 2367 2368 2422 2478 2479 2534 2590 2647 2702 2754 2755 2798 2799 2833 2860 2876


group	5Water_atoms	id	3621 3622 3623 3624 3625 3626 3627 3628 3629 3630 3631 3632 3633 3634 3635 3636 3637 3638 3639 3640 3641 3642 3643 3644 3645 3646 3647 3648 3649 3650 3651 3652 3653 3654 3655 3656 3657 3658 3659 3660 3661 3662 3663 3664 3665 3666 3667 3668 3669 3670 3671 3672 3673 3674 3675 3676 3677 3678 3679 3680 3681 3682 3683 3684 3685 3686 3687 3688 3689 3690 3691 3692 3693 3694 3695 3696 3697 3698 3699 3700 3701 3702 3703 3704 3705 3706 3707 3708 3709 3710 3711 3712 3713 3714 3715 3716 3717 3718 3719 3720 3721 3722 3723 3724 3725 3726 3727 3728 3729 3730 3731 3732 3733 3734 3735 373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


group	6CNT_atoms	id	1 2 3 4 5 6 7 8 9 10 11 12 13 14 15 16 17 18 19 20 21 22 23 24 25 26 27 28 29 30 31 32 33 34 35 36 37 38 39 40 41 42 43 44 45 46 47 48 49 50 51 52 53 54 55 56 57 58 59 60 61 62 63 64 65 66 67 68 69 70 71 72 73 74 75 76 77 78 79 80 81 82 83 84 85 86 87 88 89 90 91 92 93 94 95 96 97 98 99 100 101 102 103 104 105 106 107 108 109 110 111 112 113 114 115 116 117 118 119 120 121 122 123 124 125 126 127 128 129 130 131 132 133 134 135 136 137 138 139 140 141 142 143 144 145 146 147 148 149 150 151 152 153 154 155 156 157 158 159 160 161 162 163 164 165 166 167 168 169 170 171 172 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


group 8Hydrogen id  3622 3623 3625 3626 3628 3629 3631 3632 3634 3635 3637 3638 3640 3641 3643 3644 3646 3647 3649 3650 3652 3653 3655 3656 3658 3659 3661 3662 3664 3665 3667 3668 3670 3671 3673 3674 3676 3677 3679 3680 3682 3683 3685 3686 3688 3689 3691 3692 3694 3695 3697 3698 3700 3701 3703 3704 3706 3707 3709 3710 3712 3713 3715 3716 3718 3719 3721 3722 3724 3725 3727 3728 3730 3731 3733 3734 3736 3737 3739 3740 3742 3743 3745 3746 3748 3749 3751 3752 3754 3755 3757 3758 3760 3761 3763 3764 3766 3767 3769 3770 3772 3773 3775 3776 3778 3779 3781 3782 3784 3785 3787 3788 3790 3791 3793 3794 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


group 7Oxygen id  3621 3624 3627 3630 3633 3636 3639 3642 3645 3648 3651 3654 3657 3660 3663 3666 3669 3672 3675 3678 3681 3684 3687 3690 3693 3696 3699 3702 3705 3708 3711 3714 3717 3720 3723 3726 3729 3732 3735 3738 3741 3744 3747 3750 3753 3756 3759 3762 3765 3768 3771 3774 3777 3780 3783 3786 3789 3792 3795 3798 3801 3804 3807 3810 3813 3816 3819 3822 3825 3828 3831 3834 3837 3840 3843 3846 3849 3852 3855 3858 3861 3864 3867 3870 3873 3876 3879 3882 3885 3888 3891 3894 3897 3900 3903 3906 3909 3912 3915 3918 3921 3924 3927 3930 3933 3936 3939 3942 3945 3948 3951 3954 3957 3960 3963 3966 39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


group 7CNT_atoms_no_anchors id  1 2 3 4 5 6 7 8 9 10 11 12 13 14 15 16 17 18 19 20 21 22 23 24 25 26 27 28 29 30 31 32 33 34 35 36 37 38 39 40 41 42 43 44 45 46 47 48 49 50 51 52 53 54 55 56 57 58 59 60 61 62 63 64 65 66 67 68 69 70 71 72 73 74 75 76 77 78 79 80 81 82 83 84 85 86 87 88 89 90 91 92 93 94 95 96 97 98 99 100 101 102 103 104 105 106 107 108 109 110 111 112 113 114 115 116 117 118 119 120 121 122 123 124 125 126 127 128 129 130 131 132 133 134 135 136 137 138 139 140 141 142 143 144 145 146 147 148 149 150 151 152 153 154 155 156 157 158 159 160 161 162 163 164 165 166 167 168 169 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


group 8Almost_all id  1 2 3 4 5 6 7 8 9 10 11 12 13 14 15 16 17 18 19 20 21 22 23 24 25 26 27 28 29 30 31 32 33 34 35 36 37 38 39 40 41 42 43 44 45 46 47 48 49 50 51 52 53 54 55 56 57 58 59 60 61 62 63 64 65 66 67 68 69 70 71 72 73 74 75 76 77 78 79 80 81 82 83 84 85 86 87 88 89 90 91 92 93 94 95 96 97 98 99 100 101 102 103 104 105 106 107 108 109 110 111 112 113 114 115 116 117 118 119 120 121 122 123 124 125 126 127 128 129 130 131 132 133 134 135 136 137 138 139 140 141 142 143 144 145 146 147 148 149 150 151 152 153 154 155 156 157 158 159 160 161 162 163 164 165 166 167 168 169 170 171 17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


#this groups has all the water and ct without the atoms that belong to the anchors


kspace_style pppm/tip4p/omp 0.000001
timestep	0.001


#---------------------------------------------------------------------------Variables-------------------------------------------------------------------------#


compute temwater 5Water_atoms temp
compute temcnt 6CNT_atoms temp

compute ke_H2O 5Water_atoms ke
compute pe_H2O 5Water_atoms pe/atom
compute pe_sumH2O 5Water_atoms reduce sum c_pe_H2O

compute ke_CNT 6CNT_atoms ke
compute pe_CNT 6CNT_atoms pe/atom
compute pe_sumCNT 6CNT_atoms reduce sum c_pe_CNT


#special_bonds lj 1e-50   1e-50   1e-50
#dump	     5 all movie 10000 movie.mpg type type zoom 20.0 adiam 1.0 center s 0.5 0.5 0.5 view 0.0 0.0
#dump	     adump1 all movie 200 movie1.mpg type type box yes 0.01 zoom 1.5


thermo_style custom pe ke etotal c_ke_H2O c_ke_CNT c_pe_sumH2O c_pe_sumCNT temp c_temwater c_temcnt press pxx pzz ecoul elong step
thermo 2000

#------------------------------------------------------------Fix the tube during the first minimization---------------------------------------------------#
fix rigidtube  6CNT_atoms setforce 0.0 0.0 0.0


#------------------------------------------------------------------------Minimize cg style----------------------------------------------------------------#
min_style cg
minimize	0.0 0.0 10000 10000

#-------------------------------------------------Unfix (release)  the tube so that everything minimize together------------------------------------------#
unfix rigidtube

#-------------------------------------------------------------------------Minimize again------------------------------------------------------------------#

minimize 0.0 0.0 10000 10000

####################################################################END OF MINIMIZATION###############################################################

#########################################################################DYNAMICS#####################################################################

#------------------------------------------------------------EQUILIBRATION-AND-MINIMIZATION-COMBINED------------------------------------------------------#

#Fix the bonds and angles for water (according water models)
fix forbondsandangles 5Water_atoms shake 0.0001 500 0 b 1 a 1

#--------------------------------------------------------------------RISING OF THE TEMPERATURE------------------------------------------------------------#
#-------------------------------------------------------Step 1: Rescale temperature to 10K and relax in NVE-----------------------------------------------#


#===========-==================-=============================-==============================-===============================-=======================#
fix addtemp1cnt 7CNT_atoms_no_anchors langevin 0.0 10.0 5.0 57394
fix addtemp1water 5Water_atoms	langevin 0.0 10.0 5.0 40396
fix 1stnvecnt 7CNT_atoms_no_anchors nve
fix 1stnvewater 5Water_atoms	nve


run_style	verlet

run 10000

unfix addtemp1cnt
unfix addtemp1water

run 50000

unfix 1stnvecnt
unfix 1stnvewater


#--------------------------------------------------------Step 2: Rescale temperature to 150K and relax in NVE--------------------------------------------#
#Rescale the T to 150K, run 100000 steps and equilibrate in nve for 100000 without the fix rescale------------------------------------------------------#

fix addtemp2cnt 8Almost_all langevin 10.0 150.0 5.0 86234
fix 2ndnvecnt 8Almost_all nve

run_style	verlet
run 280000

unfix addtemp2cnt

run 50000
unfix 2ndnvecnt


#--------------------------------------------------------Step 3: Rescale temperature to 235.65K and relax in NVE----------------------------------------------#
#Rescale the T to 268.2K, run 100000 steps and equilibrate in nve for 100000 without the fix rescale----------------------------------------------------------#

fix addtemp3cnt 8Almost_all langevin 150.0 240.0 5.0 55489
fix 3rdnvecnt 8Almost_all nve

run_style	verlet
#2000 fs/celsius
run 180000

unfix addtemp3cnt
run 50000

unfix 3rdnvecnt

#--------------------------------------------------------------------------------------------------------
fix addtemp4cnt 8Almost_all langevin 240.0 ${T} 5.0 34655
fix 4nvecnt 8Almost_all nve


run_style	verlet
run 246000

unfix addtemp4cnt

run 100000
unfix 4nvecnt

#--------------------

fix addtemp5cnt 8Almost_all langevin ${T} ${T} 5.0 66985
fix 5nvecnt 8Almost_all nve


run_style verlet
run 100000

unfix addtemp5cnt
unfix 5nvecnt


#dump	     5 all movie 100000 movie.mpg type type zoom 4.0 adiam 1.5

#==========================================================================CALCULATIONS===========================================================================#
####
reset_timestep 0

#DUMP definitions for vacf
#vacf

#variable        file_vac file time-steps-vac.times
#variable        file_vac2 equal next(file_vac)
#dump            6 all custom 2000 vacf-*.txt id vx vy vz
#dump_modify     6 every v_file_vac2 pad 8 first yes

#fix addtemp6cnt 8Almost_all langevin ${T} ${T} 5.0 48556
#fix 6nvecnt 8Almost_all nve

#run_style verlet
#run 60000

#unfix addtemp6cnt
#unfix 6nvecnt

#undump 6

#reset_timestep 0
#######################################################################################################
#DUMPS definitions MSD, CCF, ISF:

#MSD
compute msdOxy2 7Oxygen msd com yes
fix formsd2 7Oxygen ave/time 100000 1 100000 c_msdOxy2[*] file computemsd${T}-com.txt mode scalar

#COM
compute com1 8Hydrogen com


##--RUNS FOR LOG VALUES:


#--------------------------------------------------------------------2 STEPS
dump	        12 8Hydrogen custom 2 hyd-msd-and-isf-*.txt id xu yu zu
dump_modify     12 pad 8

dump	        121 all custom 2 ccf-step0-*.txt id type x y z ix iy iz q
dump_modify     121 pad 8

fix comfix2  8Hydrogen ave/time 2 1 2 c_com1[*] file com${T}-2.txt mode vector

fix addtemp7cnt 8Almost_all langevin ${T} ${T} 5.0 78546
fix 7nvecnt 8Almost_all nve

run 10 upto

unfix comfix2
undump 12
undump 121
unfix addtemp7cnt
unfix 7nvecnt
#-------------------------------------------------------------10 STEPS
dump	        13 8Hydrogen custom 10 hyd-msd-and-isf-*.txt id xu yu zu
dump_modify     13 pad 8

dump	        131 all custom 10 ccf-step0-*.txt id type x y z ix iy iz q
dump_modify     131 pad 8

fix comfix10  8Hydrogen ave/time 10 1 10 c_com1[*] file com${T}-10.txt mode vector

fix addtemp8cnt 8Almost_all langevin ${T} ${T} 5.0 93154
fix 8nvecnt 8Almost_all nve

run 100 upto

unfix comfix10
undump 13
undump 131
unfix addtemp8cnt
unfix 8nvecnt
#-------------------------------------------------------------100 STEPS
dump	        14 8Hydrogen custom 100 hyd-msd-and-isf-*.txt id xu yu zu
dump_modify     14 pad 8

dump	        141 all custom 100 ccf-step0-*.txt id type x y z ix iy iz q
dump_modify     141 pad 8

fix comfix100  8Hydrogen ave/time 100 1 100 c_com1[*] file com${T}-100.txt mode vector

fix addtemp9cnt 8Almost_all langevin ${T} ${T} 5.0 23496
fix 9nvecnt 8Almost_all nve

run 1000 upto

unfix comfix100
undump 14
undump 141
unfix addtemp9cnt
unfix 9nvecnt

#-------------------------------------------------------------1000 STEPS
dump	        15 8Hydrogen custom 1000 hyd-msd-and-isf-*.txt id xu yu zu
dump_modify     15 pad 8

dump	        151 all custom 1000 ccf-step0-*.txt id type x y z ix iy iz q
dump_modify     151 pad 8

fix comfix1000  8Hydrogen ave/time 1000 1 1000 c_com1[*] file com${T}-1000.txt mode vector

fix addtemp10cnt 8Almost_all langevin ${T} ${T} 5.0 94708
fix 10nvecnt 8Almost_all nve

run 9000 upto

unfix comfix1000
undump 15
undump 151
unfix addtemp10cnt
unfix 10nvecnt

#-------------------------------------------------------------10000 STEPS to 10 million

#variable steps_log equal logfreq(10000,9,10)

dump	        16 8Hydrogen custom 10000 hyd-msd-and-isf-*.txt id xu yu zu
dump_modify     16 pad 8 #every v_steps_log  first yes

dump	        16x 5Water_atoms custom 1000000 kirkwood-data-*.txt id xu yu zu
dump_modify     16x pad 8


dump	        161 all custom 10000 ccf-step0-*.txt id type x y z ix iy iz q
dump_modify     161 pad 8 #every v_steps_log  first yes

fix comfix2000  8Hydrogen ave/time 10000 1 10000 c_com1[*] file com${T}-2000.txt mode vector

fix almostall_6   8Almost_all nvt temp ${T} ${T} 20.0
run 10000000 upto


unfix comfix2000
undump 16
undump 161
undump 16x
unfix almostall_6

#-------------------------------------------------------------10 million STEPS to 15 million, each million


dump	        17 8Hydrogen custom 1000000 hyd-msd-and-isf-*.txt id xu yu zu
dump_modify     17 pad 8 #every v_steps_log  first yes

dump	        171 all custom 1000000 ccf-step0-*.txt id type x y z ix iy iz q
dump_modify     171 pad 8 #every v_steps_log pad 8 first yes

fix comfix10000last  8Hydrogen ave/time 1000000 1 1000000 c_com1[*] file com${T}-10000last.txt mode vector

fix almostall_7   8Almost_all nvt temp ${T} ${T} 20.0
run 15000000 upto


unfix comfix10000last
undump 17
undump 171
unfix almostall_7


unfix formsd2


########################################################################################################

#rdf
reset_timestep 0
compute rdf_wat40_simbox 5Water_atoms rdf 500 2 2 2 3 3 3
fix rdfwater40_simbox 5Water_atoms ave/time 100000 1 100000 c_rdf_wat40_simbox[*] file rdfbox${T}.txt mode vector

fix addtemp12cnt 8Almost_all langevin ${T} ${T} 5.0 23664
fix 12nvecnt 8Almost_all nve


run_style verlet
run 200000

unfix addtemp12cnt
unfix 12nvecnt
unfix rdfwater40_simbox


#------------------------------------------------------------------------------------------------------rdf ends
#-----------------------------------------------------------
dump	      13 all custom 1 thermalizedcnt${T}.CNT id element type x y z
dump_modify   13 element C H O
run 0
undump 13

#--------------------


#END.
