# GK sicnt
# Test 1
#######################################################################MINIMIZATION###############################################################

#---------------------------------------------------------------------INITIALIZATION-------------------------------------------------------------#
variable T equal 298
variable s equal 10000
variable nrun equal 0
log log-${T}-${nrun}-a.lammps

package omp 1

units 	real
dimension	3
boundary	p p p
atom_style	full
#atom_modify	id yes
#neigh_modify one 5000

processors 1 1 16

#--------------------------------------------------------------------ATOM-DEFINITION------------------------------------------------------------#
read_data data-file-sicnt-water-0.6.data
# 1 Si, 2 C, 3 H, 4 O.

#-----------------------------------------------------------------------SETTINGS----------------------------------------------------------------#
#THE UNITS OF SIC TERSOFF WERE CHANGED FROM METAL TO REAL
#Interactions Si -C: TERSOFF 1989 force field
#Interactions H - O tip4p/ice
#Interactions Si-H, Si-O, C-O, C-H, LJ 6-12, using Lorentz-Berthelot mixing rules


#Non-bonded interactions: using tersoff and tip4p
pair_style hybrid tersoff/omp 	lj/cut/tip4p/long/omp 4 3 1 1 0.1577 12.0
pair_coeff * * tersoff/omp SiC_1989real.tersoff Si C NULL NULL

#for lj/cut: epsilon sigma cutoff1 cutoff2
pair_coeff 1 3 lj/cut/tip4p/long/omp 0.0 0.0
pair_coeff 1 4 lj/cut/tip4p/long/omp 0.3143 3.2784
pair_coeff 2 3 lj/cut/tip4p/long/omp 0.0 0.0
pair_coeff 2 4 lj/cut/tip4p/long/omp 0.1346 3.2834
pair_coeff 3 3 lj/cut/tip4p/long/omp 0.0 0.0
pair_coeff 4 4 lj/cut/tip4p/long/omp 0.21084 3.1668

bond_style harmonic/omp
#K can be any value since it is fixed by fix shake
bond_coeff 1 5000 0.9572

angle_style harmonic/omp
angle_coeff 1 5000 104.52

#Box size has to be included in data file
#group	1Anchor	id	595 596 622 655 656 701 749 750 797 798 799 846 847 894 895 896 942 943 989 990 1030 1031 1059 1060 1281 1329 1377 1378 1426 1474 1522 1610 1640 1659 1667 1668 1672 1673 1685 1710 1744 1789 1838 1886 1935 1983 2031 2079 2263 2264 2290 2323 2324 2369 2417 2418 2465 2466 2467 2514 2515 2562 2563 2564 2610 2611 2657 2658 2698 2699 2727 2728


group	5Water_atoms	type 3 4

group	6SiCNT_atoms	type 1 2

#group 9SiCNT_no_anchors id 	1 2 3 4 5 6 7 8 9 10 11 12 13 14 15 16 17 18 19 20 21 22 23 24 25 26 27 28 29 30 31 32 33 34 35 36 37 38 39 40 41 42 43 44 45 46 47 48 49 50 51 52 53 54 55 56 57 58 59 60 61 62 63 64 65 66 67 68 69 70 71 72 73 74 75 76 77 78 79 80 81 82 83 84 85 86 87 88 89 90 91 92 93 94 95 96 97 98 99 100 101 102 103 104 105 106 107 108 109 110 111 112 113 114 115 116 117 118 119 120 121 122 123 124 125 126 127 128 129 130 131 132 133 134 135 136 137 138 139 140 141 142 143 144 145 146 147 148 149 150 151 152 153 154 155 156 157 158 159 160 161 162 163 164 165 166 167 168 169 170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


#group 8Almost_all id 	1 2 3 4 5 6 7 8 9 10 11 12 13 14 15 16 17 18 19 20 21 22 23 24 25 26 27 28 29 30 31 32 33 34 35 36 37 38 39 40 41 42 43 44 45 46 47 48 49 50 51 52 53 54 55 56 57 58 59 60 61 62 63 64 65 66 67 68 69 70 71 72 73 74 75 76 77 78 79 80 81 82 83 84 85 86 87 88 89 90 91 92 93 94 95 96 97 98 99 100 101 102 103 104 105 106 107 108 109 110 111 112 113 114 115 116 117 118 119 120 121 122 123 124 125 126 127 128 129 130 131 132 133 134 135 136 137 138 139 140 141 142 143 144 145 146 147 148 149 150 151 152 153 154 155 156 157 158 159 160 161 162 163 164 165 166 167 168 169 170 171 1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


group 12Oxygen type 4

group 13Hydrogen type 3

#groups with neither 1 or the second group of anchors
#group 14_SiCN_no_anchors_group_1 id  1 2 3 4 5 6 7 8 9 10 11 12 13 14 15 16 17 18 19 20 21 22 23 24 25 26 27 28 29 30 31 32 33 34 35 36 37 38 39 40 41 42 43 44 45 46 47 48 49 50 51 52 53 54 55 56 57 58 59 60 61 62 63 64 65 66 67 68 69 70 71 72 73 74 75 76 77 78 79 80 81 82 83 84 85 86 87 88 89 90 91 92 93 94 95 96 97 98 99 100 101 102 103 104 105 106 107 108 109 110 111 112 113 114 115 116 117 118 119 120 121 122 123 124 125 126 127 128 129 130 131 132 133 134 135 136 137 138 139 140 141 142 143 144 145 146 147 148 149 150 151 152 153 154 155 156 157 158 159 160 161 162 163 164 165 166 167 16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


#group 15_SiCN_no_anchors_group_2 id   1 2 3 4 5 6 7 8 9 10 11 12 13 14 15 16 17 18 19 20 21 22 23 24 25 26 27 28 29 30 31 32 33 34 35 36 37 38 39 40 41 42 43 44 45 46 47 48 49 50 51 52 53 54 55 56 57 58 59 60 61 62 63 64 65 66 67 68 69 70 71 72 73 74 75 76 77 78 79 80 81 82 83 84 85 86 87 88 89 90 91 92 93 94 95 96 97 98 99 100 101 102 103 104 105 106 107 108 109 110 111 112 113 114 115 116 117 118 119 120 121 122 123 124 125 126 127 128 129 130 131 132 133 134 135 136 137 138 139 140 141 142 143 144 145 146 147 148 149 150 151 152 153 154 155 156 157 158 159 160 161 162 163 164 165 166 167 1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


kspace_style pppm/tip4p/omp 0.00001
kspace_modify order 7
timestep	1.0

#---------------------------------------------------------------------------Variables-------------------------------------------------------------------------#
compute temwater 5Water_atoms temp
compute temsicnt 6SiCNT_atoms temp

compute  peratom 5Water_atoms pe/atom
compute  pe1 5Water_atoms reduce sum c_peratom

#dump	     adump1 all movie 1 movie1.mpg type type box yes 0.01 zoom 1.0

#----------------------------------------------------------------------------------------------------------------------------------------------------------#
thermo_style custom pe c_pe1 ke etotal temp c_temwater c_temsicnt press pzz step
thermo 10000

fix rigidtube  6SiCNT_atoms setforce 0.0 0.0 0.0
min_style cg
minimize	0.0 0.0 10000 10000
#unfix rigidtube
#minimize 0.0 0.0 10000 10000

#dump	      1 all custom 1 thermalizedsicnt${T}-{nrun}.SiCNT id element type x y z
#dump_modify   1 element Si C H O
#run 0
#undump 1


#kspace_style pppm/tip4p 0.000001
#timestep	1.0

#------------------------------------------------------------EQUILIBRATION-AND-MINIMIZATION-COMBINED------------------------------------------------------#

#Fix the bonds and angles for water (according water models)
fix forbondsandangles 5Water_atoms shake 0.0001 500 0 b 1 a 1

#fix addtemp1sicnt 9SiCNT_no_anchors langevin 0.0 10.0 5.0 57394
fix addtemp1water 5Water_atoms	langevin 0.0 10.0 5.0 40396
#fix 1stnvesicnt 9SiCNT_no_anchors nve
fix 1stnvewater 5Water_atoms	nve

run_style	verlet
run 50000

#unfix addtemp1sicnt
unfix addtemp1water

run 10000

#unfix 1stnvesicnt
unfix 1stnvewater

#compute voro1 all voronoi/atom
#dump dump3 all custom ${s} vvoro-*.txt id type c_voro1[*]
#dump_modify dump2 pad 8

#--------------------------------------------------------Step 2: Rescale temperature to 150K and relax in NVE--------------------------------------------#


#--------------------------------------------------------Step 3: Rescale temperature to 235.65K and relax in NVE----------------------------------------------#
#Rescale the T to 268.2K, run 100000 steps and equilibrate in nve for 100000 without the fix rescale----------------------------------------------------------#

#fix addtemp3sicnt 9SiCNT_no_anchors langevin 10.0 ${T} 5.0 34655
fix addtemp3water 5Water_atoms	langevin 10.0 ${T} 5.0 97930
#fix 3rdnvesicnt 9SiCNT_no_anchors nve
fix 3rdnvewater 5Water_atoms	nve


run_style	verlet
#1000 fs /K
run 298000 #change

#unfix addtemp3sicnt
unfix addtemp3water

run 50000

#unfix 3rdnvesicnt
unfix 3rdnvewater


################################################################### APPLY-FORCE (PRESSUDRE GRADIENT)####################################################
#-------------------------------------------------------------------------2 thermosthats------------------------------------------------------------------#------------------------------------------------------------------#

#----------------------------------------------------------
#fix sicnt_nvt_g1 14_SiCN_no_anchors_group_1 nvt temp ${T} ${T} 20.0
#fix water_nvt_g1 5Water_atoms	nvt temp ${T} ${T} 20.0

#run_style verlet

#run 20000

#unfix sicnt_nvt_g1
#unfix water_nvt_g1


#----------------------------------------------------------

#fix sicnt_nvt_g2 15_SiCN_no_anchors_group_2 nvt temp ${T} ${T} 20.0
#fix water_nvt_g2 5Water_atoms	nvt temp ${T} ${T} 20.0

#run_style verlet

#run 20000

#unfix sicnt_nvt_g2
#unfix water_nvt_g2
#--------------------------------------------------------------------

#fix nvts1 9SiCNT_no_anchors nvt temp ${T} ${T} 20.0
#fix nvtw1 5Water_atoms	nvt temp ${T} ${T} 20.0

#run 100000

#unfix nvts1
#unfix nvtw1

#----------------------------------------------------------------

#fix nvts2 9SiCNT_no_anchors npt temp ${T} ${T} 20.0 iso 1.0 1.0 100.0
#fix nvtw2 5Water_atoms	nvt temp ${T} ${T} 20.0

fix npt1 5Water_atoms nvt temp ${T} ${T} 20.0
run 200000
unfix npt1

#unfix nvts2
#unfix nvtw2

###############################################################################

#for isf purposes----------------------------------------------------------------------------
compute com1 13Hydrogen com
fix comfix2  13Hydrogen  ave/time 2 1 2 c_com1[*] file com-${T}-${nrun}.txt mode vector

#vcm of water
compute for_vcm_all all chunk/atom molecule
compute vcmwatercom all vcm/chunk for_vcm_all
fix vcmwater 5Water_atoms ave/time 5 10 50 c_vcmwatercom[3] ave window 3 file vcm-$T-${fvaluez}-${nrun}.txt mode vector

#for smsd, isf etc purposes
variable        file_vac file time-steps-isf.times
variable        file_vac2 equal next(file_vac)
dump	        d1 all custom 1 uni-file-${nrun}-*.txt id type element x y z xs ys zs xu yu zu xsu ysu zsu ix iy iz vx vy vz
dump_modify     d1 every v_file_vac2 pad 8 first yes

fix   aveatom1 5Water_atoms ave/atom 20 5000 100000 vz
dump	    8  5Water_atoms custom            100000 vz-*-$T-${fvaluez}-${nrun}.txt id element type x y z f_aveatom1
dump_modify   8 element Si C H O

variable steptostop equal step
variable forceinz atom "v_fvaluez*((v_steptostop > 0) && (v_steptostop<=8000000))"

	#Two different thermostasts..
	#Thermostat the water but remove the bias temperature in z-axis direction

	compute nonbiasT1 5Water_atoms temp/profile  1 1 0 x 1 out tensor
	fix 3rdnvtprod 5Water_atoms  nvt temp ${T} ${T} 5.0
	fix_modify 3rdnvtprod temp nonbiasT1

	#Thermostat the SiCNT
	#fix 4thnvtprod  9SiCNT_no_anchors nvt temp ${T} ${T} 5.0


#dump	      7 5Water_atoms custom 1000 dump.SiCNTwatsteps id element vz
#dump_modify   7 element Si C H O

#Apply the force:
#fix forceall 12Oxygen addforce 0.0 0.0 v_forceinz
fix forceall 5Water_atoms addforce 0.0 0.0 v_forceinz

run 8005000

undump d1

#-----------------------------------------------------------
dump	      1 all custom 1 thermalizedsicnt${T}-${nrun}.SiCNT id element type x y z
dump_modify   1 element Si C H O
run 0
undump 1

#--------------------


#END
