# Thermalize nano tube
#######################################################################MINIMIZATION###############################################################

#---------------------------------------------------------------------INITIALIZATION-------------------------------------------------------------#
variable T equal 300

variable label string C_25_7_14-rebo
log ${label}-therm.lammps

processors 1 1 16
package omp 1

units 	metal
dimension	3
boundary	p p p
atom_style	full
#atom_modify	id yes

#--------------------------------------------------------------------ATOM-DEFINITION------------------------------------------------------------#
read_data ${label}.data
# 1 C,  H, 3 O.

#-----------------------------------------------------------------------SETTINGS----------------------------------------------------------------#
#THE UNITS OF SIC TERSOFF WERE CHANGED FROM METAL TO REAL
#Interactions H - O tip4p/ice
# using Lorentz-Berthelot mixing rules

#Non-bonded interactions:
# pair_style   lj/cut/tip4p/long 3 2 1 1 0.1577 10

# #for lj/cut: epsilon sigma cutoff1 cutoff2
# pair_coeff 1 1  0.0 0.0
# pair_coeff 1 2  0.0 0.0
# #pair_coeff 1 3  0.108505  3.2834  #for C-O
# pair_coeff 1 3  0.101694  3.27945  #for C-O
# pair_coeff 2 2  0.0 0.0
# pair_coeff 2 3  0.0 0.0
# #pair_coeff 3 3  0.21084   3.1668 #O-O
# pair_coeff 3 3  0.1852   3.1589 #O-O

#Non-bonded interactions: model TIP4P-Ew + REBO
#pair_style hybrid  rebo/omp   lj/cut/tip4p/long/omp 3 2 1 1 0.1250 10 	lj/cut/coul/long/omp 10
#pair_coeff * * rebo/omp CH.rebo C NULL NULL

#for lj/cut: epsilon sigma cutoff1 cutoff2
#pair_coeff 1 2 lj/cut/coul/long/omp 0.0 0.0
#pair_coeff 1 3 lj/cut/coul/long/omp 0.004766908 3.282175 #for C-O
#pair_coeff 2 2 lj/cut/tip4p/long/omp 0.0 0.0
#pair_coeff 2 3 lj/cut/tip4p/long/omp 0.0 0.0
#pair_coeff 3 3 lj/cut/tip4p/long/omp 0.00803 3.16435 #O-O


#Recent changes: May 1st 2020
#Non-bonded interactions: model TIP4P-Ew + REBO
pair_style hybrid  rebo/omp   lj/cut/tip4p/long/omp 3 2 1 1 0.1250 12
pair_coeff * * rebo/omp CH.rebo C NULL NULL

#for lj/cut: epsilon sigma cutoff1 cutoff2
pair_coeff 1 2 lj/cut/tip4p/long/omp 0.0 0.0
pair_coeff 1 3 lj/cut/tip4p/long/omp 0.004766908 3.282175 #for C-O
pair_coeff 2 2 lj/cut/tip4p/long/omp 0.0 0.0
pair_coeff 2 3 lj/cut/tip4p/long/omp 0.0 0.0
pair_coeff 3 3 lj/cut/tip4p/long/omp 0.00803 3.16435 #O-O


bond_style harmonic
#K can be any value since it is fixed by fix shake
bond_coeff 1 15000 0.9572

angle_style harmonic
angle_coeff 1 15000 104.52


#Box size has to be included in data file
#all the anchors are here:

group	5Water_atoms	type	2 3

group	6CNT_atoms	type 1

#place the ids here-------------------------------------
group	6CNT_atoms_no_anchors	id 1 2 3 4 5 6 7 8 9 10 11 12 13 14 15 16 17 18 19 20 23 24 25 26 27 28 29 30 31 32 33 34 35 36 37 38 39 40 41 42 43 44 45 46 47 48 51 52 53 54 55 56 57 58 59 60 61 62 63 64 65 66 67 68 69 70 71 72 73 74 75 76 79 80 81 82 83 84 85 86 87 88 89 90 91 92 93 94 95 96 97 98 99 100 101 102 103 104 106 107 108 109 110 111 112 113 114 115 116 117 118 119 120 121 122 123 124 125 126 127 128 129 130 131 132 134 135 136 137 138 139 140 141 142 143 144 145 146 147 148 149 150 151 152 153 154 155 156 157 158 159 160 162 163 164 165 166 167 168 169 170 171 172 173 174 175 176 177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

group 8Hydrogen type 2

group 7Oxygen type 3

#place the ids here---------------------------------
group 9Almost_all id 1 2 3 4 5 6 7 8 9 10 11 12 13 14 15 16 17 18 19 20 23 24 25 26 27 28 29 30 31 32 33 34 35 36 37 38 39 40 41 42 43 44 45 46 47 48 51 52 53 54 55 56 57 58 59 60 61 62 63 64 65 66 67 68 69 70 71 72 73 74 75 76 79 80 81 82 83 84 85 86 87 88 89 90 91 92 93 94 95 96 97 98 99 100 101 102 103 104 106 107 108 109 110 111 112 113 114 115 116 117 118 119 120 121 122 123 124 125 126 127 128 129 130 131 132 134 135 136 137 138 139 140 141 142 143 144 145 146 147 148 149 150 151 152 153 154 155 156 157 158 159 160 162 163 164 165 166 167 168 169 170 171 172 173 174 175 176 177 178 179 1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


kspace_style pppm/tip4p 0.00001
timestep	0.001


#---------------------------------------------------------------------------Variables-------------------------------------------------------------------------#


compute temwater 5Water_atoms temp
compute temcnt 6CNT_atoms_no_anchors temp

compute ke_H2O 5Water_atoms ke
compute pe_H2O 5Water_atoms pe/atom
compute pe_sumH2O 5Water_atoms reduce sum c_pe_H2O

compute ke_CNT 6CNT_atoms_no_anchors ke
compute pe_CNT 6CNT_atoms_no_anchors pe/atom
compute pe_sumCNT 6CNT_atoms_no_anchors reduce sum c_pe_CNT


#special_bonds lj 1e-50   1e-50   1e-50
#dump	     5 all movie 10000 movie.mpg type type zoom 20.0 adiam 1.0 center s 0.5 0.5 0.5 view 0.0 0.0
dump	     adump1 all movie 1000 ${label}-therm.mpg type type box yes 0.01 zoom 6.0


thermo_style custom pe ke etotal c_ke_H2O c_ke_CNT c_pe_sumH2O c_pe_sumCNT temp c_temwater c_temcnt press pxx pzz ecoul elong step
thermo 2000

fix rigidtube  6CNT_atoms setforce 0.0 0.0 0.0
min_style cg
minimize	0.0 0.0 10000 10000

unfix rigidtube
minimize 0.0 0.0 10000 10000
#fix rigidtube2  6CNT_atoms setforce 0.0 0.0 0.0


#Fix the bonds and angles for water (according water models)
fix forbondsandangles 5Water_atoms shake 0.0001 500 0 b 1 a 1


#===========-==================-=============================-==============================-===============================-=======================#

fix lang1a 5Water_atoms	langevin 0.0 10.0 5.0 40396
fix nve1a 5Water_atoms	nve

fix lang1b 6CNT_atoms_no_anchors	langevin 0.0 10.0 5.0 40396
fix nve1b 6CNT_atoms_no_anchors	nve

run_style	verlet
run 20000

unfix lang1a
unfix lang1b
run 5000
unfix nve1a
unfix nve1b


#------------------
fix lang2a 5Water_atoms	langevin 10.0 ${T} 5.0 40396
fix nve2a 5Water_atoms	nve
fix lang2b 6CNT_atoms_no_anchors	langevin 10.0 ${T} 5.0 40396
fix nve2b 6CNT_atoms_no_anchors	nve

run 288000

unfix lang2a
unfix lang2b

run 20000
unfix nve2a
unfix nve2b

#--------------------
fix nvt1 5Water_atoms	nvt temp ${T} ${T} 20.0
fix nvt2 6CNT_atoms_no_anchors	nvt temp ${T} ${T} 20.0
fix mom1 5Water_atoms momentum 1 linear 1 1 1 rescale

run_style	verlet
run 100000

unfix nvt1
unfix nvt2


#-----------------------------------------------------------
dump	      13 all custom 1 ${label}-therm.lammpstrj id element type x y z
dump_modify   13 element C H O
run 0
undump 13


write_restart ${label}-therm.restart


#END.
